f(x) := 2*sin(x + 0.5) + x - 1.5  # # Вариант 19. Ввод функции
f(x) solve → 0.204576912922  # # корень уравнения в MathCAD
x := -10, -9.99 .. 10  # # Создаем массив значений x с шагом 0.01
# [plot: f(x) vs x]
x := -0.3, -0.299 .. 0.3  # # Приближение для более точного понимания диапазона корня
# [plot: f(x) vs x]
